// COMSOL Multiphysics 5.5.0.292 model "Multimode Step Index Optical Fiber.mph"
// Outline of the model tree

Parameters
  dcore = 50[um]
  dclad = 120[um]
  wl = 1[um]
  freq = c_const/wl
  G1 = 0.695790
  G2 = 0.452497
  G3 = 0.712513
  l1 = 0.061568
  l2 = 0.119921
  l3 = 8.656641
  wl1 = wl*1e6
  nsquared = 1+((G1*wl1^2)/(wl1^2-l1^2))+((G2*wl1^2)/(wl1^2-l2^2))+((G3*wl1^2)/(wl1^2-l3^2))
  nr = sqrt(nsquared)
  dlen = 0.0025
  nclad = nr-(dlen*nr)

Geometry
  geom1 "Geometry 1" (2D, length unit µm)
    c1: Circle | r = dcore/2
    c2: Circle | r = dclad/2
    fin: Finalize "Form Union"

Materials
  mat1: Common "Material 1" on domains 2
    RefractiveIndex
      n = nr
      ki = 0
  mat2: Common "Material 2" on domains 1
    RefractiveIndex
      n = nclad
      ki = 0

Physics
  ewfd: ElectromagneticWavesFrequencyDomain on all domains
    dependent variable E = {Ex, Ey, Ez}
    wee1: WaveEquationElectric (default)
    pec1: PerfectElectricConductor (default)
    init1: init "Initial Values 1" (default)

Mesh
  mesh1 "Mesh 1"
    size: MeshSizeDefault | hmax = 8.04; hmin = 0.036; hcurve = 0.3; hgrad = 1.3
    ftri1: FreeTri "Free Triangular 1" on domains 2
      size1: Size on domains 2 | hauto = 3
    ftri2: FreeTri "Free Triangular 2" on remaining entities
      size1: Size on domains 1 | hauto = 6

Studies
  std1 "Study 1"
    mode: ModeAnalysis | modeFreq = freq; neigs = 12; shift = nr

Solver configurations
  sol1 "Solution 1" (study std1)
    v1: Variables "Dependent Variables 1"
    e1: Eigenvalue "Eigenvalue Solver 1" | transform = effective_mode_index; neigs = 12; shift = nr
      dDef: Direct

Datasets
  dset1: Solution | solution = sol1

Derived values
  gev1: EvalGlobal "Global Evaluation 1" | data = dset1; table = tbl1; expr = ewfd.dampzdB

Tables
  tbl1: Table
    // Global Evaluation 1 (ewfd.beta)
    Effective mode index | Propagation constant (rad/m) | Attenuation constant (rad/m) | Attenuation constant, dB (rad/m)
    1.4514-6.76896e-15i | 4.5597e+06 | 2.12653e-08 | 1.84708e-07
    1.4514-1.83886e-14i | 4.5597e+06 | 5.77694e-08 | 5.01779e-07
    1.45157+4.1215e-13i | 4.56024e+06 | -1.29481e-06 | -1.12465e-05
    1.45157+2.29878e-12i | 4.56024e+06 | -7.22184e-06 | -6.27281e-05
    1.45157-5.42926e-13i | 4.56024e+06 | 1.70565e-06 | 1.48151e-05
    1.45157-6.97083e-13i | 4.56024e+06 | 2.18995e-06 | 1.90217e-05
    1.45208 | 4.56184e+06 | 6.68758e-14 | 5.80876e-13
    1.45208 | 4.56184e+06 | 3.14264e-13 | 2.72967e-12
    1.45208 | 4.56184e+06 | 3.29225e-14 | 2.85961e-13
    1.45208 | 4.56184e+06 | -1.62548e-12 | -1.41187e-11
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
Plots
  pg1: PlotGroup2D "Electric Field (ewfd)" | data = dset1
    surf1: Surface | expr = ewfd.normE